// COMSOL Multiphysics 6.2.0.339 model "Heart_2D_Fabian.mph"
// Heart_2D_Fabian
// Outline of the model tree

Parameters
  scaling_sigma = 1/100
  scaling_k = 1
  scaling_c1 = 0.26*10
  scaling_A = 140e-3*1.5
  scaling_c2 = 0.1*10
  scaling_e = 0.9
  V2S_SAN = 1
  V2S_torso = 1
  rand_amp = 0

Functions
  rn1: Random "Random randfnc" | funcname = randfnc; nargs = 2; type = normal; seed = 113013

Variables
  var1 "Variables.SAN" on domains 23
    a = -0.60
    b = -0.30
    c1 = 1000
    c2 = 1.0
    d = 0
    e = 0.066
    A = 33e-3
    B = -22e-3
    k = 1000
    sigma_e = 0.05*scaling_sigma*V2S_SAN
    sigma_i = 0.05*scaling_sigma*V2S_SAN
    iion1 = k*c1*(Vm1-B)*(a-(Vm1-B)/A)*(1-(Vm1-B)/A)+k*c2*u1
    Vi0 = -0.06
    Ve0 = 0
    u0 = 0
    Vm1 = Vi1-Ve1
    Vec = Ve1
    Vm = Vm1
    Vmdt = Vi1t-Ve1t
  var2 "Variables.Atria" on domains 3, 5
    a = 0.13
    b = 0
    c1 = scaling_c1
    c2 = scaling_c2
    d = 1
    e = 0.010*scaling_e
    A = scaling_A
    B = -85e-3
    k = 1000*scaling_k
    sigma_e = 0.8*scaling_sigma
    sigma_i = 0.8*scaling_sigma
    iion1 = k*c1*(Vm1-B)*(a-(Vm1-B)/A)*(1-(Vm1-B)/A)+k*c2*u1*(Vm1-B)
    Vi0 = -0.085
    Ve0 = 0
    u0 = 0
    Vm1 = Vi1-Ve1
    Vec = Ve1
    Vm = Vm1
  var3 "Variables.AVN" on domains 10
    a = 0.13
    b = 0
    c1 = scaling_c1
    c2 = scaling_c2
    d = 1
    e = 0.010*scaling_e
    A = scaling_A
    B = -85e-3
    k = 1000*scaling_k
    sigma_e = 0.05*scaling_sigma*1
    sigma_i = 0.05*scaling_sigma*1
    iion1 = k*c1*(Vm1-B)*(a-(Vm1-B)/A)*(1-(Vm1-B)/A)+k*c2*u1*(Vm1-B)
    Vi0 = -0.085
    Ve0 = 0
    u0 = 0
    Vm1 = Vi1-Ve1
    Vec = Ve1
    Vm = Vm1
  var4 "Variables.His" on domains 11, 12, 15
    a = 0.13
    b = 0
    c1 = scaling_c1
    c2 = scaling_c2
    d = 1
    e = 0.0045*scaling_e
    A = scaling_A*1.00
    B = -85e-3
    k = 1000*scaling_k
    sigma_e = 1*scaling_sigma
    sigma_i = 1*scaling_sigma
    iion1 = k*c1*(Vm1-B)*(a-(Vm1-B)/A)*(1-(Vm1-B)/A)+k*c2*u1*(Vm1-B)
    Vi0 = -0.085
    Ve0 = 0
    u0 = 0
    Vm1 = Vi1-Ve1
    Vec = Ve1
    Vm = Vm1
  var5 "Variables.Bundle" on domains 13, 17, 19, 21
    a = 0.13
    b = 0
    c1 = scaling_c1
    c2 = scaling_c2
    d = 1
    e = (0.0020 + rand_amp*rand)*scaling_e
    A = scaling_A
    B = -85e-3
    k = 1000*scaling_k
    sigma_e = 1.5*scaling_sigma
    sigma_i = 1.5*scaling_sigma
    iion1 = k*c1*(Vm1-B)*(a-(Vm1-B)/A)*(1-(Vm1-B)/A)+k*c2*u1*(Vm1-B)
    Vi0 = -0.085
    Ve0 = 0
    u0 = 0
    Vm1 = Vi1-Ve1
    Vec = Ve1
    Vm = Vm1
    rand = randfnc(x,y)
  var6 "Variables.Ventricles" on domains 4, 14, 20
    a = 0.13
    b = 0
    c1 = scaling_c1
    c2 = scaling_c2
    d = 1
    e = (0.0050+rand_amp*rand)*scaling_e
    A = scaling_A
    B = -85e-3
    k = 1000*scaling_k
    sigma_e = 0.8*scaling_sigma
    sigma_i = 0.8*scaling_sigma
    iion1 = k*c1*(Vm1-B)*(a-(Vm1-B)/A)*(1-(Vm1-B)/A)+k*c2*u1*(Vm1-B)
    Vi0 = -0.085
    Ve0 = 0
    u0 = 0
    Vm1 = Vi1-Ve1
    Vec = Ve1
    Vm = Vm1
    rand = randfnc(x,y)
  var7 "Variables.Purkinje" on domains 7, 18
    a = 0.13
    b = 0
    c1 = scaling_c1
    c2 = scaling_c2
    d = 1
    e = (0.0043+rand_amp*rand)*scaling_e
    A = scaling_A
    B = -85e-3
    k = 1000*scaling_k
    sigma_e = 3.5*scaling_sigma
    sigma_i = 3.5*scaling_sigma
    iion1 = k*c1*(Vm1-B)*(a-(Vm1-B)/A)*(1-(Vm1-B)/A)+k*c2*u1*(Vm1-B)
    Vi0 = -0.085
    Ve0 = 0
    u0 = 0
    Vm1 = Vi1-Ve1
    Vec = Ve1
    Vm = Vm1
    rand = randfnc(x,y)
  var8 "Variables.Torso" on domains 1, 2, 6, 8, 9, 16, 22
    VI = VL(V)-VR(V)
    VII = VF(V)-VR(V)
    VIII = VF(V)-VL(V)
  var9 "Dielectric.Properties.Heart" on domains 3-5, 7, 10-15, 17-21, 23
    sigma_b = 0.053677*V2S_torso
    epsilon_b = 23562000*V2S_torso
  var10 "Dielectric.Properties.Lungs" on domains 2, 22
    sigma_b = 0.038904*V2S_torso
    epsilon_b = 32248000*V2S_torso
  var11 "Dielectric.Properties.Torso" on domains 1
    sigma_b = 0.20197*V2S_torso
    epsilon_b = 25700000*V2S_torso
  var12 "Dielectric.Properties.Blood" on domains 6, 8, 9, 16
    sigma_b = 0.7*V2S_torso
    epsilon_b = 5260*V2S_torso

Couplings
  intop1: Integration "Integration VR" on points 2 | opname = VR
  intop2: Integration "Integration VL" on points 55 | opname = VL
  intop3: Integration "Integration VF" on points 54 | opname = VF
  intop4: Integration "Integration VGND" on points 1 | opname = VGND

Geometry
  geom1 "Geometry 1" (2D, length unit mm)
    c1: Circle | pos = {150, 100}; r = 45
    c2: Circle | pos = {150, 100}; r = 30
    dif1: Difference | input = c1; input2 = c2
    r1: Rectangle | pos = {100, 40}; size = {100, 60}
    dif2: Difference | input = dif1; input2 = r1
    e1: Ellipse | pos = {150, 100}; semiaxes = {45, 69}
    e2: Ellipse | pos = {150, 100}; semiaxes = {30, 46}
    dif3: Difference | input = e1; input2 = e2
    r2: Rectangle | pos = {100, 99}; size = {100, 80}
    dif4: Difference | input = dif3; input2 = r2
    r3: Rectangle | pos = {145, 40}; size = {10, 100}
    dif5: Difference | input = r3; input2 = dif2, dif4; keepadd = on; keepsubtract = on; keep = true
    del1: Delete "Delete Entities 1" | input = r3
    c3: Circle | pos = {140-2^0.5, 143+2^0.5}; r = 5
    int1: Intersection | input = c3, dif2; keep = on
    del2: Delete "Delete Entities 2" | input = c3
    dif6: Difference | input = dif2; input2 = int1; keepadd = on; keepsubtract = on; keep = true
    del3: Delete "Delete Entities 3" | input = dif2
    r4: Rectangle | pos = {140, 40}; size = {20, 60}
    int2: Intersection | input = dif5, r4; keep = on
    del4: Delete "Delete Entities 4" | input = r4
    copy1: Copy | input = int2; keep = on; displx = 0; disply = 0
    dif7: Difference | input = dif5; input2 = int2
    r5: Rectangle | pos = {145, 100}; size = {10, 4}
    r6: Rectangle | pos = {145, 96}; size = {10, 4}
    dif8: Difference | input = dif7; input2 = r5; keepadd = on; keepsubtract = on; keep = true
    mov1: Move | input = dif8; displx = -10; disply = 0
    del5: Delete "Delete Entities 5" | input = dif7
    mov2: Move | input = mov1; displx = 10; disply = 0
    b1: BezierPolygon "Bézier Polygon 1"
      p = 
        {120, 180, 180, 180, 160, 140, 120, 120, 120, 120}
        {100, 100, 80, 60, 40, 40, 60, 98, 98, 98}
      degree = {1, 1, 1, 1, 1, 1, 1, 1, 1}
      w = {1, 1, 1, 1, 1, 1, 1, 1, 1, 1, 1, 1, 1, 1, 1, 1, 1, 1}
    b2: BezierPolygon "Bézier Polygon 2"
      p = {{120, 180, 180, 160, 140, 120, 120, 120}, {100, 100, 120, 140, 140, 120, 100, 100}}
      degree = {1, 1, 1, 1, 1, 1, 1}
      w = {1, 1, 1, 1, 1, 1, 1, 1, 1, 1, 1, 1, 1, 1}
    dif9: Difference | input = b2; input2 = dif6, int1, mov2, r5; keepadd = on; keepsubtract = on; keep = true
    del6: Delete "Delete Entities 6" | input = b2
    dif10: Difference | input = b1; input2 = copy1, dif4; keepadd = on; keepsubtract = on; keep = true
    del7: Delete "Delete Entities 7" | input = b1
    e3: Ellipse | pos = {150, 100}; semiaxes = {32, 49}
    int3: Intersection | input = dif4, e3; keep = on
    del8: Delete "Delete Entities 8" | input = e3
    r7: Rectangle | pos = {145, 50}; size = {2, 50}
    r8: Rectangle | pos = {153, 50}; size = {2, 50}
    int4: Intersection | input = copy1, r7; keep = on
    int5: Intersection | input = copy1, r8; keep = on
    int6: Intersection | input = int3, r7; keep = on
    int7: Intersection | input = int3, r8; keep = on
    del9: Delete "Delete Entities 9" | input = r7, r8
    dif11: Difference | input = dif4; input2 = int3; keepadd = on; keepsubtract = on; keep = true
    del10: Delete "Delete Entities 10" | input = dif4
    rot1: Rotate
      input = copy1, dif10, dif11, dif6, dif9, int1, int3, int4, int5, int6, int7, mov2, r5, r6
      rot = 45
      pos = {150, 100}
    r9: Rectangle | pos = {-100, -100}; size = {500, 400}
    r10: Rectangle | size = {300, 200}
    e4: Ellipse | pos = {160, 100}; semiaxes = {60, 110}
    dif12: Difference | input = r10; input2 = e4
    dif13: Difference | input = r9; input2 = dif12, rot1; keepadd = on; keepsubtract = on; keep = true
    del11: Delete "Delete Entities 11" | input = r9
    pt1: Point (disabled) | p = {100, 0}
    pt2: Point (disabled) | p = {200, 0}
    pt3: Point (disabled) | p = {0, 200}
    pt4: Point (disabled) | p = {300, 200}
    fin: Finalize "Form Union"

Physics
  g: GeneralFormPDE "PDE_Heart" on domains 3-5, 7, 10-15, 17-21, 23
    dependent variable var1 = {Ve1, Vi1, u1}
    gfeq1: GeneralFormPDE (default)
      f = {iion1, -iion1, k*e*((Vm1-B)/A-d*u1-b)}
      Ga = {{-sigma_e*Ve1x, -sigma_e*Ve1y}, {-sigma_i*Vi1x, -sigma_i*Vi1y}, {0, 0}}
      da = {1, -1, 0, -1, 1, 0, 0, 0, 1}
    zflx1: ZeroFluxBoundary "Zero Flux 1" (default)
    init1: init "Initial Values 1" (default) | Ve1 = Ve0; Vi1 = Vi0; u1 = u0
    flux1: FluxBoundary "Flux/Source Torso Atria" on boundaries 7, 9, 14, 15, 25, 34, 48, 50, 52, 54, 56, 61
      g = {1*(ec.Jx*ec.nx+ec.Jy*ec.ny), 0, 0}
    flux2: FluxBoundary "Flux/Source Torso Ventricles" on boundaries 8, 18, 22, 28, 32, 37, 55, 60, 62, 68
      g = {1*(ec.Jx*ec.nx+ec.Jy*ec.ny), 0, 0}
  ec: ConductiveMedia "Electric Currents" on domains 1, 2, 6, 8, 9, 16, 22
    dependent variable V
    EquationForm.form = Transient
    PortSweepSettings.zref = 50
    cucn1: CurrentConservation (default)
      sigma_mat = userdef
      sigma = sigma_b
      epsilonr_mat = userdef
      epsilonr = epsilon_b
      materialType = solid
    ein1: ElectricInsulation (default)
    init1: init "Initial Values 1" (default)
    pot1: ElectricPotential on boundaries 7, 9, 14, 15, 25, 34, 48, 50, 52, 54, 56, 61 | V0 = Ve1
    pot2: ElectricPotential on boundaries 8, 10, 18, 22, 28, 32, 36, 37, 55, 60, 62, 68 | V0 = Ve1
    pot3: ElectricPotential "Electric Potential GND" on points 1

Mesh
  mesh1 "Mesh 1"
    size: MeshSizeDefault | hmax = 33.5; hmin = 0.15; hcurve = 0.3; hgrad = 1.3
    ftri1: FreeTri "Free Triangular 1" on remaining entities

Studies
  std1 "Study 1"
    time: Transient "Time Dependent" | tlist = range(0,0.002,1)

Solver configurations
  sol1 "Solution 1" (study std1)
    v1: Variables "Dependent Variables 1"
    t1: Time "Time-Dependent Solver 1" | tlist = range(0,0.002,1); tstepsbdf = strict; masssingular = yes
      dDef: Direct | linsolver = pardiso
      fc1: FullyCoupled

Datasets
  dset1: Solution | solution = none
  dset2: Solution | solution = sol1

Plots
  pg1: PlotGroup2D "2D Plot Group 1" | data = dset2
    surf1: Surface | data = dset2; expr = Vm; unit = 1
  pg2: PlotGroup1D "1D Plot Group 2" | data = none
    ptgr1: PointGraph on points 1 | data = dset2; expr = VI; unit = V; autopoint = off; legends = VI
    ptgr2: PointGraph on points 1 | data = dset2; expr = VII+0.001; unit = V; legends = VII
    ptgr3: PointGraph on points 1 | data = dset2; expr = VIII+0.002; unit = V; legends = VIII
  pg5: PlotGroup1D "1D Plot Group 5" | data = dset2; typeintitle = off; descriptionintitle = off; unitintitle = off
    ptgr1: PointGraph on points 8 | expr = Vm+.05; unit = 1; autopoint = off; legends = Sinus Node
    ptgr2: PointGraph on points 13 | expr = Vm-0.1; unit = 1; legends = Atria muscle
    ptgr3: PointGraph on points 22 | expr = Vm-0.2; unit = 1; legends = AV Node
    ptgr4: PointGraph on points 24 | expr = Vm-0.3; unit = 1; legends = Bundle branch
    ptgr5: PointGraph on points 26 | expr = Vm-0.4; unit = 1; legends = Purkinje fibers
    ptgr6: PointGraph on points 37 | expr = Vm-0.5; unit = 1; legends = Inner ventricle
    ptgr7: PointGraph on points 14 | expr = Vm-0.6; unit = 1; legends = Outner ventricle
  pg3: PlotGroup2D "2D Plot Group 3" | data = dset2
    surf1: Surface | expr = Ve1
  pg4: PlotGroup2D "Electric Potential (ec)" | data = dset2
    surf1: Surface | data = dset2; expr = V; unit = V; descr = Electric potential
  pg6: PlotGroup2D "2D Plot Group 6" | data = dset2
    surf1: Surface | data = dset2; expr = Vm; unit = 1
    arws1: ArrowSurface
      expr = {Ve1xtt, Ve1ytt}
      descr = Gradient of Ve1, second time derivative
      arrowxmethod = coord
      xcoord = 150
      arrowymethod = coord
      ycoord = 100
      arrowlength = normalized

Exports
  anim1: Animation | target = player; maxframes = 100; frametime = 0.2
  anim2: Animation | target = player; maxframes = 100